# Л1.Арифметика кольца вычитаний Чернов К3-86Б
diva(x, y) := floor(x/y)
diva(17, 5) = 3
diva(-17, 5) = -4
moda(x, y) :=
    if y == 0
        return x
    return x - y*floor(x/y)
moda(17, 5) = 2
moda(-17, 5) = 3
moda(8, 0) = 8
mod(-17, 5) = -2
# Л2.Решение уравнений CX=1(mod m). Расширенный алгоритм Евклида.
# Чернов К3-86Б
inmod(m, c) :=
    a ← m
    b ← c
    p0 ← 0
    p1 ← 1
    z ← 1
    r ← 1
    while r > 0
        q ← diva(a, b)
        r ← moda(a, b)
        p ← q*p1 + p0
        p0 ← p1
        p1 ← p
        a ← b
        b ← r
        z ← -z
    return moda(-z*p0, m)  # 7x=5(mod 13)
# 7y=1(mod 13)
y := inmod(13, 7)
y = 2
7*2 - 13 = 1
x := moda(5*y, 13)
x = 10
moda(x*7, 13) = 5
# Л3.Возведение в степень по модулю. Чернов К3-86Б
# Вычисление функции a^b(mod m)
degmod(a, b, m) :=
    k ← b
    p ← 1
    s ← a
    while k > 0
        if moda(k, 2) > 0
            p ← moda(p*s, m)
        s ← moda(s*s, m)
        k ← diva(k, 2)
    return p
m := 137
a := 12
x := 0 .. m - 1
y[x] := degmod(x, a, m)
z[x] := degmod(a, x, m)
# степенная
# [plot: y[x] vs x]
# Показательная
# [plot: z[x] vs x]
# Л4. Функция Эйлера: простые числа. Чернов К3-86Б
simple(n) :=
    if n == 2
        return 1
    if moda(n, 2) == 0
        return 0
    d ← 3
    while d*d ≤ n
        if moda(n, d) == 0
            return 0
        d ← d + 2
    return 1
simple(5) = 1
simple(50) = 0
simple(11) = 1
euler(n) :=
    r ← 1
    d ← 2
    while n > 1
        s ← 1
        while moda(n, d) == 0
            n ← diva(n, d)
            s ← s*d
        if s > 1
            r ← r*(s - s/d)
        if d == 2
            d ← 3
        else
            d ← d + 2
    return r
euler(18) = 6
euler(3) = 2
euler(29) = 28
# ЛР 5 Поиск образующих элементов Z. Чернов К3-86Б
genel(m) :=
    for k ∈ 2 .. m - 1
        for i ∈ 1 .. m - 1
            y[i] ← degmod(k, i, m)
        z ← sort(y)
        s ← 0
        for i ∈ 0 .. m - 1
            s ← s + (z[i] - i)^2
        w[k] ← k
        if s > 0
            w[k] ← 0
    w
m := 7
x := 0 .. m
genel(7) = [0; 0; 0; 3; 0; 5; 0]
# Определяем все образующие числа в промежутке [2,p].
# Способ опознавания: Каждое число от 2 до m -1 последовательно
# возводятся в степени от 1 до m - 1 по модулю.
# Если эти числа образуют все элементы массива Z (т.е. от 1 до p - 1),
# то это число-образующее.
y[x] := degmod(3, x, m)
z[x] := degmod(4, x, m)
# [plot: y[x] vs x]
# [plot: z[x] vs x]
# ЛР 6 схема Диффи-Хелман. Чернов К3-86Б
p := 17
simple(p) = 1
g := 12
genel(p) = [0; 0; 0; 3; 0; 5; 6; 7; 0; 0; 10; 11; 12; 0; 14; 0; 0]
# A | B
a := 25
b := 7
ya := degmod(g, a, p) = 5
yb := degmod(g, b, p) = 7
yA := degmod(yb, a, p) = 10
yB := degmod(ya, b, p) = 10
# ЛР 7 Алгоритм RSA. Чернов К3-86Б
# A | B(организатор схемы)
m, e - публичные .. □
# d,p,q - секретные
p := 67
simple(p) = 1
q := 47
simple(q) = 1
m := p*q = 3149
e := 17
f := (p - 1)*(q - 1) = 3036
d := inmod(f, e) = 893
# Передача сообщения
# A | B
m1 := 32*13 + 19 = 435
m2 := 32*6 + 21 = 213
a1 := degmod(m1, e, m) = 1417
a2 := degmod(m2, e, m) = 1726
b1 := degmod(a1, d, m) = 435
diva(b1, 32) = 13
moda(b1, 32) = 19
b2 := degmod(a2, d, m) = 213
diva(b2, 32) = 6
moda(b2, 32) = 21
# ЛР 8 Схема Эль-Гамаля. Чернов К3-86Б
# B-организатор схемы
p := 181
simple(p) = 1
g := 10
x := 85
genel(p) = [
    0; 0; 2; 0; 0; 0; 0; 0; 0; 0
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]
y := degmod(g, x, p) = 109
# A - передает сообщение
m1 := 33
k := 15
a := degmod(g, k, p) = 7
b := moda(m1*degmod(y, k, p), p) = 50
# A передает a и b организатору B
m2 := moda(b*degmod(a, p - 1 - x, p), p) = 33
# ЛР 9 Целочисленная арифметика многократной точности. Чернов К3-86Б
add(x, y, n, b) :=
    c ← 0
    for i ∈ 0 .. n
        w[i] ← moda(x[i] + y[i] + c, b)
        if (x[i] + y[i] + c) ≥ b
            c ← 1
        else
            c ← 0
    w[i + 1] ← c
    w
a := [4; 1]
b := [2; 7]
c := add(a, b, 1, 10) = [6; 8; 0]
sub(x, y, n, b) :=
    c ← 0
    for i ∈ 0 .. n
        w[i] ← moda(x[i] - y[i] + c, b)
        if (x[i] - y[i] + c) ≥ 0
            c ← 0
        else
            c ← -1
    w
a := [2; 9]
b := [2; 3]
c := sub(a, b, 1, 10) = [0; 6]
mul(x, y, n, t, b) :=
    w ← 0 .. n + t + 1
    for i ∈ 0 .. n + t + 1
        w[i] ← 0
    for i ∈ 0 .. t
        c ← 0
        for j ∈ 0 .. n
            v ← moda(w[i + j] + x[j]*y[i] + c, b)
            u ← diva(w[i + j] + x[j]*y[i] + c, b)
            w[i + j] ← v
            c ← u
        w[i + n + 1] ← u
    w
a := [0; 6; 0]
b := [1; 2; 0]
k := 0 .. 16
c := mul(a, b, 2, 2, 10) = [0; 6; 2; 1; 0; 0]
p := [90820577; 33878439; 76463849; 98133417; 96199038; 94914784; 84765094; 90529510; 34]
q := [98288533; 29425397; 64296799; 61413177; 81908344; 54996198; 93266709; 27691329; 3]
c := mul(p, q, 8, 8, 100000000) = [79543541; 92900268; 7514759; 5058989; 35639587; 83059712; 79603549; 56273586; 23067253; 49867663; 42251820; 66782086; 32378887; 80496200; 78888676; 38162575; 114; 0]
